// COMSOL Multiphysics 6.3.0.290 model "Untitled.mph"
// Outline of the model tree

Parameters
  F_max = -10

Functions
  rm1: Ramp "斜坡 1" | location = 1; slope = 10; smoothzoneloc = 0.1

Geometry
  geom1 "几何 1" (3D, length unit m)
    cyl1: Cylinder "圆柱体 1" | r = 5; h = 2
    pt1: Point "点 1"
    blk1: Block "长方体 1" | size = {12, 12, 3}; pos = {-6, -6, 2}
    pt2: Point "点 2" | p = {, , 5}
    fin: Finalize "形成联合体"

Materials
  mat1: Common "材料 1" on domains 2
    def: def "基本"
      density = 900
    Enu: Enu "杨氏模量和泊松比"
      E = 2600[MPa]
      nu = 0.32
    ElastoplasticModel: ElastoplasticModel "弹塑性材料模型"
      sigmags = 50[MPa]
      Et = 20[MPa]
      Hillcoefficients = {0, 0, 0, 0, 0, 0}
      ys = {0, 0, 0, 0, 0, 0}
  mat2: Common "材料 2" on domains 1
    def: def "基本"
      density = 1200
    Enu: Enu "杨氏模量和泊松比"
      E = 300[GPa]
      nu = 0.1

Physics
  solid: SolidMechanics "固体力学" on all domains
    dependent variable u = {u, v, w}
    lemm1: LinearElasticModel "线弹性材料 1" (default)
      plsty1: Plasticity "塑性 1" on all domains
    free1: Free "自由 1" (default)
    init1: init "初始值 1" (default)
    bndl1: BoundaryLoad "边界载荷 1" on boundaries 4
      forceType = TotalForce
      forceReferenceArea = {0, 0, F_max}
      force = {0, 0, F_max}
    disp1: Displacement0 "指定位移 1" on points 9 | Direction = {prescribed, prescribed, free}
    disp2: Displacement2 "指定位移 2" on boundaries 8 | Direction = {free, free, prescribed}
    rms1: RigidMotionSuppression "刚体运动抑制 1" (disabled) on domains 2
    disp3: Displacement2 "指定位移 3" (disabled) on no boundaries | Direction = {free, free, prescribed}; U0 = {0, 0, -1[nm]}
    lemm2: LinearElasticModel "线弹性材料 2" on domains 1
    att1: Attachment "连接件 1" on boundaries 3, 9 | ConnectionType = FlexibleType
    rms2: RigidMotionSuppression "刚体运动抑制 2" on domains 2

Mesh
  mesh1 "网格 1"
    size: MeshSizeDefault "大小" | hauto = 3; custom = on
    fq1: FreeQuad "自由四边形网格 1" on boundaries 9
    swe1: Sweep "扫掠 1" on remaining entities

Studies
  std1 "研究 1"
    stat: Stationary "稳态" | usestol = on; geometricNonlinearity = on

Solver configurations
  sol1 "解 1" (study std1)
    v1: Variables "因变量 1"
    s1: Stationary "稳态求解器 1"
      fc1: FullyCoupled "全耦合 1"
      d1: Direct "建议的直接求解器 (solid)"

Datasets
  dset1: Solution | solution = sol1

Plots
  pg1: PlotGroup3D "应力 (solid)" | data = dset1
    vol1: Volume "体 1" | expr = solid.sGpzz; descr = 应力张量，zz 分量
      def: Deform "变形" | expr = {u, v, w}; descr = 位移场